# Расчётная схема и исходные данные
# Чжан Юе
# СМ1И-82Б
# Вариант №11 Усечённый конус
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# Время пребывания на Луне
τ := 21  # зем. сут.
# Температура внутри кабины:
T_0 := 297  # К
# Энергия, выделяемая человеком и приборами:
Q := 560  # Вт
# Поглощательная способность поверхности аппарата:
A_s := 0.18
# Плотность потока прямого солнечного излучения:
q_s := 1400  # Вт/м^2
# Излучательные способности стенки, слоёв ЭВТИ (фольги) и внешней поверхности аппарата соответственно:
ε_0 := 0.95
ε_n := 0.95
ε := 0.05
# Геометрические размеры кабины:
r_1 := 2  # м
r_2 := 0.3  # м
h := 3  # м
# На основании расчёта дать рекомендации относительно требуемой системы обеспечения теплового режима внутри кабины (пол кабины идеально теплоизолирован).
# Постоянная Стефана-Больцмана:
σ := 5.67*10^-8  # Вт/(м^2*К^4)
# Условия на Луне
# Определим угол η:
η := atan(h/(r_1 - r_2)) = 1.05525
η/deg = 60.4612
# Принимаем, что диффузный средний угловой коэффициент, определяющий долю собственного излучения лунной поверхности, падающей на рассматриваемый участок поверхности модуля:
φ_mn := (1 - cos(η))/2 = 0.253494
# Угол возвышения Солнца в зависимости от суток:
β_s(τ_a) := π*τ_a/14  # рад
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# Температура лунной поверхности в зависимости от суток:
T_m(τ_a) :=
    373.5*sin(β_s(τ_a))^(1/6) if 0 < τ_a < 14
    111 if 14 ≤ τ_a ≤ 21
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# Расчёт с учётом максимальных значений теплового потока
# Расчёт теплового режима модуля выполним для условий лунных дня и ночи.
# Днём рассмотрим случай, когда угол возвышения солнца равен 90 градусов, так как при этом достигается максимальная температура лунной поверхности (максимальный поток собственного излучения Луны), а солнечное излучение попадает на всю поверхность модуля. То есть в это время происходит наибольший внешний нагрев модуля. В ночное время происходит наименьший внешний нагрев.
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# Для участка поверхности модуля, покрытого ЭВТИ с числом слоёв n в условиях установившегося теплообмена справедливы следующие соотношения для плотности результирующего потока излучения:
q_01 == ε_0*ε/(ε_0 + ε - ε_0*ε)*σ(T_0^4 - T_1^4)
m == n - 1
q_mn == ε*σ(T_m^4 - T_n^4)/(2 - ε)
q_n == ε_n*σ*T_n^4 - A_s*q_s*cos(Θ_s) - ε_n*σ*T_m^4*φ_mn
q_01 == q_12 == q_mn == q_n
Θ_s
# - угол между направлением на Солнце и внешней нормалью к поверхности участка модуля.
# Из этой системы уравнений получаем соотношения для температуры внешнего экрана и плотности результирующего потока излучения внешней поверхности модуля:
T_n(n) == nthroot((T_0^4 + C_2*C_3)/(1 + C_1*C_2), 4)
q_n(n) == ε_n*σ*((T_0^4 + C_2*C_3)/(1 + C_1*C_2)) - ε_n*σ*T_m^4*φ_mn - A_s*q_s*cos(Θ_s)
C_1 == (2 - ε)*ε_n/ε
C_2(n) == (ε_0 + ε - ε_0*ε)/(ε_0*(2 - ε)) + n - 1
C_3 == (2 - ε)/(ε*σ)*(ε_n*σ*T_m^4*φ_mn + A_s*q_s*cos(Θ_s))
# Суммарный результирующий поток излучения для всего аппарата определяется следующим выражением:
Q_Σ == sum(q_ni*F_i, i) - Q_чел
# Если Q_Σ>0, то поток излучения покидает его. Соответственно если Q_Σ<0, то поток падает на него.
# Расчёт теплового режима
# Площадь боковой поверхности модуля (поверхность усечённого конуса):
F_1 := π*sqrt(h^2 + (r_1 - r_2)^2)*(r_1 + r_2) = 24.9154  # м^2
# Площадь потолка модуля:
F_2 := π*r_2^2 = 0.282743  # м^2
# Угол между направлением на Солнце и внешней нормалью к боковой поверхности участка модуля:
Θ_s1 := η = 1.05525
# Угол между направлением на Солнце и внешней нормалью к поверхности потолка модуля:
Θ_s2 := 0
# Лунный день (Солнце находится в зените, когда будет максимальное значание потока)
T_m(7) = 373.5  # К
C_1 := (2 - ε)*ε_n/ε = 37.05
C_2(n) := (ε_0 + ε - ε_0*ε)/(ε_0*(2 - ε)) + n - 1
# Боковая поверхность
φ_mn = 0.253494
C_31 := (2 - ε)/(ε*σ)*(ε_n*σ*T_m(7)^4*φ_mn + A_s*q_s*cos(Θ_s1)) = 2.68231e11  # Вт/м^2
T_n1D(n) := nthroot((T_0^4 + C_2(n)*C_31)/(1 + C_1*C_2(n)), 4)
q_n1(n) := ε_n*σ*((T_0^4 + C_2(n)*C_31)/(1 + C_1*C_2(n))) - ε_n*σ*T_m(7)^4*φ_mn - A_s*q_s*cos(Θ_s1)
# Крышка
φ_mn.кр := 0
C_32 := (2 - ε)/(ε*σ)*(ε_n*σ*T_m(7)^4*φ_mn.кр + A_s*q_s*cos(Θ_s2)) = 1.73333e11  # Вт/м^2
T_n2D(n) := nthroot((T_0^4 + C_2(n)*C_32)/(1 + C_1*C_2(n)), 4)
q_n2(n) := ε_n*σ*((T_0^4 + C_2(n)*C_32)/(1 + C_1*C_2(n))) - ε_n*σ*T_m(7)^4*φ_mn.кр - A_s*q_s*cos(Θ_s2)
Q_ΣD(n) := q_n1(n)*F_1 + q_n2(n)*F_2 - Q
# Для обеспечения заданной температуры T0 в кабине суммарный результирующий поток должен быть равен нулю.
# Лунная ночь
T_m(14) = 111  # К
C_1 := (2 - ε)*ε_n/ε = 37.05
C_2(n) := (ε_0 + ε - ε_0*ε)/(ε_0*(2 - ε)) + n - 1
# Боковая поверхность
φ_mn = 0.253494
C_31 := (2 - ε)/(ε*σ)*(ε_n*σ*T_m(14)^4*φ_mn) = 1.42576e9  # Вт/м^2
T_n1N(n) := nthroot((T_0^4 + C_2(n)*C_31)/(1 + C_1*C_2(n)), 4)
q_n1(n) := (ε_n*σ*((T_0^4 + C_2(n)*C_31)/(1 + C_1*C_2(n))) - ε_n*σ*T_m(14)^4*φ_mn)
# Крышка
φ_mn.кр := 0
C_32 := (2 - ε)/(ε*σ)*(ε_n*σ*T_m(14)^4*φ_mn.кр) = 0  # Вт/м^2
T_n2N(n) := nthroot((T_0^4 + C_2(n)*C_32)/(1 + C_1*C_2(n)), 4)
q_n2(n) := (ε_n*σ*((T_0^4 + C_2(n)*C_32)/(1 + C_1*C_2(n))) - ε_n*σ*T_m(14)^4*φ_mn.кр)
Q_ΣN(n) := q_n1(n)*F_1 + q_n2(n)*F_2 - Q
ΔQ(n) := Q_ΣD(n) - Q_ΣN(n)
# Рассмотрим разность между суммарными тепловыми потоками в условиях лунных дня и ночи при разных числах ЭВТИ.
# При n=1
Q_ΣD(1) = -521.422  # Вт
Q_ΣN(1) = -35.8467  # Вт
ΔQ(1) = -485.576  # Вт
# При n=2
Q_ΣD(2) = -546.454  # Вт
Q_ΣN(2) = -375.95  # Вт
ΔQ(2) = -170.504  # Вт
# При n=3
Q_ΣD(3) = -551.785  # Вт
Q_ΣN(3) = -448.377  # Вт
ΔQ(3) = -103.407  # Вт
# При n=4
Q_ΣD(4) = -554.105  # Вт
Q_ΣN(4) = -479.899  # Вт
ΔQ(4) = -74.2058  # Вт
# При n=5
Q_ΣD(5) = -555.403  # Вт
Q_ΣN(5) = -497.538  # Вт
ΔQ(5) = -57.8651  # Вт
# При n=6
Q_ΣD(6) = -556.232  # Вт
Q_ΣN(6) = -508.81  # Вт
ΔQ(6) = -47.4223  # Вт
# Вывод
# Анализируя разницы между Q_ΣD(n) иQ_ΣN(n) для лунных дня и ночи приходим к выводу, что для обеспечения заданнного теплового режима рационально использовать 6 экрана ЭВТИ, так как это соответствует тому, что изменение теплового потока занимает 5-10% суммарного теплового потока, что позволяет регулировать температуру внутри кабины активной СОТР. При этом она будет холодильное устройство.
Q_ΣN(6) = -508.81  # Вт
Q_ΣD(6) = -556.232  # Вт
# Температуры внешнего экрана на боковой поверхности и на крышке модуля днём и ночью в этом случае:
T_n1D(6) = 291.722  # К
T_n2D(6) = 261.742  # К
T_n1N(6) = 93.4288  # К
T_n2N(6) = 78.462  # К
# Решение задачи для всех возможных случаев положения Солнца
# 1.Рассмотрим боковую поверхность усечённого конуса, которая задаётся следующим уравнением:
F(x, y, z) == x^2/r_2^2 + y^2/r_2^2 - (z + c)^2/b^2
# Определим неизвестные параметры b и c
c := r_1*h/(r_2*(1 - r_1/r_2)) = -3.52941
b := h + c = -0.529412
# Уравнение боковой поверхности в декартовой системе координат:
F(x, y, z) :=
    x^2/r_2^2 + y^2/r_2^2 - (z + c)^2/b^2 if 0 ≤ z ≤ h
    0 otherwise
# Преобразуем декартовую с.к. в цилиндрическую. Тогда уравнение боковой поверхности:
F(r, φ, z) :=
    (r*cos(φ))^2/r_2^2 + (r*sin(φ))^2/r_2^2 - (z + c)^2/b^2 if 0 ≤ z ≤ h
    0 otherwise
# Компоненты вектора направления нормали к поверхности усечённого конуса при z=0:
x_n(φ) := 2*r_1*cos(φ)/r_2^2
y_n(φ) := 2*r_1*sin(φ)/r_2^2
z_n(φ) := -2*c/b^2
# Определим угол между направлением на Солнце и нормалью к боковой поверхности.
# Компоненты единичного вектора напрвления на Солнце:
x_s(τ_a) := cos(β_s(τ_a))
y_s(τ_a) := 0
z_s(τ_a) := sin(β_s(τ_a))
# Косинус угла между направлением на Солнце и нормалью к боковой поверхности:
сosΘ_s(τ_a, φ) := (x_s(τ_a)*x_n(φ) + y_s(τ_a)*y_n(φ) + z_s(τ_a)*z_n(φ))/sqrt(x_n(φ)^2 + y_n(φ)^2 + z_n(φ)^2)
# Учтём наличие теневых участков:
сosΘ_s(τ_a, φ) :=
    сosΘ_s(τ_a, φ) if сosΘ_s(τ_a, φ) > 0 and τ_a < 14
    0 otherwise
С_1 := (2 - ε)*ε_n/ε
С_2(n) := (ε_0 + ε - ε_0*ε)/(ε_0*(2 - ε)) + n - 1
C_31(τ_a, φ) := (2 - ε)/(ε*σ)*(ε_n*σ*T_m(τ_a)^4*φ_mn + A_s*q_s*сosΘ_s(τ_a, φ))
# Температура внешнего экрана боковой части:
T_n1(τ_a, φ, n) := nthroot((T_0^4 + С_2(n)*C_31(τ_a, φ))/(1 + C_1*С_2(n)), 4)
# Определим зависимость для плотности результирующего потока излучения внешней поверхности модуля:
q_n1(τ_a, φ, n) := ε_n*σ*((T_0^4 + С_2(n)*C_31(τ_a, φ))/(1 + C_1*С_2(n))) - ε_n*σ*T_m(τ_a)^4*φ_mn - A_s*q_s*сosΘ_s(τ_a, φ)
# 2.Рассмотрим крышку
# Косинус угла между направлением на Солнце и нормалью к крышке:
сosΘ_sp(τ_a) := cos(π/2 - β_s(τ_a))
# Учтём лунную ночь:
сosΘ_sp(τ_a) :=
    сosΘ_sp(τ_a) if 0 ≤ τ_a ≤ 14
    0 otherwise
C_32(τ_a) := (2 - ε)/(ε*σ)*(A_s*q_s*сosΘ_sp(τ_a))
# Температура внешнего экрана крышки:
T_n2(τ_a, n) := nthroot((T_0^4 + С_2(n)*C_32(τ_a))/(1 + C_1*С_2(n)), 4)
# Определим зависимость для плотности результирующего потока излучения внешней поверхности модуля:
q_n2(τ_a, n) := ε_n*σ*((T_0^4 + С_2(n)*C_32(τ_a))/(1 + C_1*С_2(n))) - A_s*q_s*сosΘ_sp(τ_a)
# Определим полный поток результирующего излучения:
Q_Σ(τ_a, n) := integral(q_n1(τ_a, φ, n)*F_1/(2*π), φ = 0 .. 2*π) + q_n2(τ_a, n)*F_2 - Q
# Построим графики Q_Σ(n) в 21 сутках.
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# Определим разность между максимумом и минимумом теплового потока в течение 21 земных суток при разных числах ЭВТИ:
for τ_a ∈ 0 .. 21
    ΔQ(n) ← max(Q_Σ(τ_a, n)) - min(Q_Σ(τ_a, n))
# При n=1
ΔQ(1) = -485.576
# При n=2
ΔQ(2) = -170.504
# При n=3
ΔQ(3) = -103.407
# При n=4
ΔQ(4) = -74.2058
# При n=5
ΔQ(5) = -57.8651
# При n=6
ΔQ(6) = -47.4223
# Два последних графика ("Солнце в зените" и "ночь") полностью совпадают с построенными ранее при решении задачи дикретным способом.
# Графики, построенные для дня, когда Солнце не находится в зените, лежат между графиками "Солнце в зените" и "ночь". Это означает, что можно сделать вывод, аналогичный тому, что сделан выше, то есть  для обеспечения заданнного теплового режима рационально использовать 6 экранов ЭВТИ, так как при этом суммарный тепловой поток колеблется в диапазоне 5-10% своего значения. В этом случае необходимо использовать активную СОТР - холодильное устройство.
# Построим график изменения температуры внешнего экрана крышки модуля в течение 21 суток:
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limit(Q_Σ(14, n), n → ∞+) → -560
limit(ΔQ(n), n → ∞+) → -2.86770935223e-12
